// COMSOL Multiphysics 5.6.0.280 model "多孔介质材料脱水.mph"
// 多孔介质中的大蒸发率蒸发
// modeldescr_heat/evaporation_porous_media_large_rate
// 本教程描述烘干箱中的层流气流通过非饱和多孔介质的情况。空气在入口处为干燥状态，通过多孔介质后湿度增加。本例计算多孔介质中的含水饱和度随时间的变化，其中假设水仅以蒸汽的形式离开多孔介质。
// Outline of the model tree

Parameters
  T0 = 293.15[K]  // Ambient temperature
  u0 = 0.1[m/s]  // Freestream velocity
  phi_0 = 0.1  // Ambient relative humidity
  phi_1 = 0.4  // Porous medium relative humidity
  S_il = 0.1  // Irreductible liquid phase saturation
  por = 0.8  // Porosity
  kappa = 1e-14[m^2]  // Permeability
  k_s = 0.21[W/(m*K)]  // Porous matrix thermal conductivity (Potato mat. prop. [Hadler et al.])
  cp_s = 1650[J/(kg*K)]  // Porous matrix heat capacity (Potato mat. prop. [Hadler et al.])
  rho_s = 1528[kg/m^3]  // Porous matrix density (Potato mat. prop. [Hadler et al.])

Functions
  pw1: Piecewise "Relative Permeability, Moist Air" | funcname = kappa_rma; arg = S_l; pieces = {{0, 1/1.1, 1-1.1*S_l}, {1/1.1, 1, eps}}
  pw2: Piecewise "Relative Permeability, Liquid Phase" | funcname = kappa_rl; arg = S_l; pieces = {{0, S_il, eps}, {S_il, 1, ((S_l-S_il)/(1-S_il))^3}}
  int1: Interpolation "Sorption Isotherm"
    funcname = wc_int
    table = 
      {0.003393653, 12}
      {0.029277859, 16}
      {0.087160155, 20}
      {0.164632661, 24}
      {0.247214032, 28}
      {0.326229692, 32}
      {0.397902657, 36}
      {0.461214875, 40}
      {0.516448722, 44}
      {0.564402552, 48}
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    argunit = 1
    fununit = kg/m^3
  rm1: Ramp

Couplings
  intop1: Integration "Integration Free Medium" on domains 1 | opname = intopFree
  intop2: Integration "Integration Porous Medium" on domains 2 | opname = intopPorous
  intop3: Integration "Integration Inlet/Outlet" on boundaries 1, 8 | opname = intopInletOutlet

Common definitions
  ampr1: AmbientProperties | T_amb = T0; phi_amb = phi_0

Geometry
  geom1 "Geometry 1" (2D, length unit m)
    r1: Rectangle | size = {0.15, 0.05}
    r2: Rectangle | pos = {0.04, 0.02}; size = {0.04, 0.005}
    fil1: Fillet | point = r2(1) points 1-4; radius = 2e-3
    fin: Finalize "Form Union"

Materials
  mat1: Common "Potato" on domains 2
    def "Basic"
      porosity = por
      hydraulicpermeability = kappa
      watercontent = wc_int(phi)
      diffusion = 1e-8[m^2/s]*exp(-2.8+2*w_c/rho_s/por)
      thermalconductivity = k_s
      density = rho_s
      heatcapacity = cp_s

Physics
  spf: LaminarFlow on all domains
    dependent variable u = {u, v, w}
    PhysicalModelProperty.Compressibility = CompressibleMALT03
    PhysicalModelProperty.EnablePorousMediaDomains = 1
    AdvancedSettingProperty.UsePseudoTime = 1
    fp1: FluidProperties (default) | minput_relativehumidity_src = root.comp1.ham1.phi
    init1: init "Initial Values 1" (default)
    wallbc1: WallBC "Wall 1" (default)
    fmp1: FluidAndMatrixProperties on domains 2
      epsilon_p_mat = userdef
      epsilon_p = por*(1-mt.sl)
      kappa_mat = userdef
      kappa = kappa_rma(mt.sl)*kappa
      minput_relativehumidity_src = root.comp1.ham1.phi
    inl1: InletBoundary "Inlet 1" on boundaries 1 | BoundaryCondition = FullyDevelopedFlow; Uavfdf = u0
    out1: OutletBoundary "Outlet 1" on boundaries 8 | p0 = 0-15000*rm1((t-50)/20*t)
  mt: MoistureTransportInAir on all domains
    dependent variable relativehumidity
    ShapeProperty.order_relativehumidity_disc = 1
    PhysicalModelProperty.dz = 1[m]
    PhysicalModelProperty.MixtureType = ConcentratedSpecies
    ma1: MoistAir (default)
    init1: InitialValues (default) | phi_init_src = root.comp1.ampr1.phi_amb
    ins1: Insulation (default)
    hporous1: HygroscopicPorousMedium on domains 2 | kappa_rl = kappa_rl(mt.sl); capillaryConductionModel = diffusion
    init2: InitialValues on domains 2 | phi_init = phi_1
    ifl1: Inflow on boundaries 1 | phiustr_src = root.comp1.ampr1.phi_amb; Tustr_src = root.comp1.ampr1.T_amb
    ofl1: Outflow on boundaries 8
  ht: HeatTransferInMoistAir on all domains
    dependent variable T
    ma1: MoistAirHeatTransferModel "Moist Air 1" (default)
    init1: init "Initial Values 1" (default) | Tinit_src = userdef; Tinit = 293.15[K]
    ins1: ThermalInsulation (default)
    mporous1: MoistPorousMediumHeatTransferModel "Moist Porous Medium 1" on domains 2
      lw1: LiquidWaterMoistPorousMediumHeatTransferModel "Liquid Water 1" (default)
      ma1: MoistAirMoistPorousMediumHeatTransferModel "Moist Air 1" (default)
      pm1: PorousMatrixPorousMediumHeatTransferModel "Porous Matrix 1" (default)
        porousMatrixPropertiesType = solidPhaseProperties
    ifl1: Inflow on boundaries 1 | Tustr_src = userdef; Tustr = 293.15[K]
    ofl1: ConvectiveOutflow "Outflow 1" on boundaries 8

Multiphysics
  mf1: MoistureFlow on all domains | Fluid_physics = spf; Transport_physics = mt
  ham1: HeatAndMoisture on all domains | Heat_physics = ht; Moist_physics = mt
  nitf1: NonIsothermalFlow on all domains | Fluid_physics = spf; Heat_physics = ht

Mesh
  mesh1 "Mesh 1"
    size: MeshSizeDefault | table = cfd; hauto = 6
    size1: Size on boundaries 2, 3 | table = cfd; hauto = 4
    cr1: CornerRefinement on domains 1, 2 | boundary = boundaries 2, 3
    ftri1: FreeTri "Free Triangular 1" on remaining entities
      size1: Size on domains 2 | table = cfd; hauto = 2
    bl1: BndLayer "Boundary Layers 1" on domains 1, 2
      blp1: BndLayerProp "Boundary Layer Properties 1" on boundaries 2-7, 9-12

Studies
  std1 "Study 1"
    stat: Stationary | solve for = {spf, ht}; activateCoupling = {mf1, off, ham1, off, nitf1, on}
    time: Transient "Time Dependent" | tlist = range(0,1,10) range(20,10,50)
    time2: Transient "Time Dependent 2" | tlist = range(50,10,1000)

Solver configurations
  sol1 "Solution 1" (study std1)
    v1: Variables "Dependent Variables 1"
    s1: Stationary "Stationary Solver 1"
      se1: Segregated | maxsegiter = 200; segstabacc = segcflcmp
        ss1: SegregatedStep "Velocity u, Pressure p"
          segvar = {comp1_u, comp1_p, comp1_spf_inl1_Pinlfdf}
          linsolver = d1
          subdamp = 0.5
        ss2: SegregatedStep "Temperature" | segvar = {comp1_T}; linsolver = d2; subdamp = 0.5
        ll1: LowerLimit | lowerlimit = comp1.T 0
      d1: Direct "Direct, fluid flow variables (spf)" | linsolver = pardiso; pivotperturb = 1.0E-13
      d2: Direct "Direct, temperature (ht)" | linsolver = pardiso; pivotperturb = 1.0E-13
    su1: StoreSolution "Solution Store 1"
    v2: Variables "Dependent Variables 2" | initmethod = sol; notsolmethod = sol
      comp1_mt_phi: Field "相对湿度 (comp1.mt.phi)" | scalemethod = manual
    t1: Time "Time-Dependent Solver 1"
      tlist = range(0,1,10) range(20,10,50)
      atolmethod = {comp1_mt_phi, global, comp1_p, scaled, comp1_T, global, comp1_u, global, comp1_spf_inl1_Pinlfdf, global}
      atolvaluemethod = {comp1_mt_phi, factor, comp1_p, factor, comp1_T, factor, comp1_u, factor, comp1_spf_inl1_Pinlfdf, factor}
      atolfactor = {comp1_mt_phi, 0.1, comp1_p, 1, comp1_T, 0.1, comp1_u, 0.1, comp1_spf_inl1_Pinlfdf, 0.1}
      atol = {comp1_mt_phi, 1e-3, comp1_p, 1e-3, comp1_T, 1e-3, comp1_u, 1e-3, comp1_spf_inl1_Pinlfdf, 1e-3}
      maxorder = 2
      stabcntrl = on
      bwinitstepfrac = 0.01
      estrat = exclude
      rhoinf = 0.5
      predictor = constant
      se1: Segregated
        maxsegiter = 10
        ntolfact = 0.01
        segstabacc = segaacc
        segaaccdim = 5
        segaaccmix = 0.9
        segaaccdelay = 1
        ss1: SegregatedStep "Velocity u, Pressure p"
          segvar = {comp1_u, comp1_p, comp1_spf_inl1_Pinlfdf}
          linsolver = d1
          subdamp = 0.8
          subjtech = once
        ss2: SegregatedStep "Moisture transport"
          segvar = {comp1_mt_phi}
          linsolver = d2
          subdamp = 0.7
          subjtech = once
          subiter = 2
        ss3: SegregatedStep "Temperature" | segvar = {comp1_T}; linsolver = d3; subdamp = 0.8; subjtech = once
        ll1: LowerLimit | lowerlimit = comp1.T 0
      d1: Direct "Direct, fluid flow variables" | linsolver = pardiso; pivotperturb = 1.0E-13
      d2: Direct "Direct, Moisture Transport Variables" | linsolver = pardiso; pivotperturb = 1.0E-13
      d3: Direct "Direct, temperature (ht)" | linsolver = pardiso; pivotperturb = 1.0E-13
    su2: StoreSolution "Solution Store 2"
    v3: Variables "Dependent Variables 3" | initmethod = sol; notsolmethod = sol
      comp1_mt_phi: Field "相对湿度 (comp1.mt.phi)" | scalemethod = manual
    t2: Time "Time-Dependent Solver 2"
      tlist = range(50,10,1000)
      atolmethod = {comp1_mt_phi, global, comp1_p, scaled, comp1_T, global, comp1_u, global, comp1_spf_inl1_Pinlfdf, global}
      atolvaluemethod = {comp1_mt_phi, factor, comp1_p, factor, comp1_T, factor, comp1_u, factor, comp1_spf_inl1_Pinlfdf, factor}
      atolfactor = {comp1_mt_phi, 0.1, comp1_p, 1, comp1_T, 0.1, comp1_u, 0.1, comp1_spf_inl1_Pinlfdf, 0.1}
      atol = {comp1_mt_phi, 1e-3, comp1_p, 1e-3, comp1_T, 1e-3, comp1_u, 1e-3, comp1_spf_inl1_Pinlfdf, 1e-3}
      maxorder = 2
      stabcntrl = on
      bwinitstepfrac = 0.01
      estrat = exclude
      rhoinf = 0.5
      predictor = constant
      se1: Segregated
        maxsegiter = 10
        ntolfact = 0.01
        segstabacc = segaacc
        segaaccdim = 5
        segaaccmix = 0.9
        segaaccdelay = 1
        ss1: SegregatedStep "Velocity u, Pressure p"
          segvar = {comp1_u, comp1_p, comp1_spf_inl1_Pinlfdf}
          linsolver = d1
          subdamp = 0.8
          subjtech = once
        ss2: SegregatedStep "Moisture transport"
          segvar = {comp1_mt_phi}
          linsolver = d2
          subdamp = 0.7
          subjtech = once
          subiter = 2
        ss3: SegregatedStep "Temperature" | segvar = {comp1_T}; linsolver = d3; subdamp = 0.8; subjtech = once
        ll1: LowerLimit | lowerlimit = comp1.T 0
      d1: Direct "Direct, fluid flow variables" | linsolver = pardiso; pivotperturb = 1.0E-13
      d2: Direct "Direct, Moisture Transport Variables" | linsolver = pardiso; pivotperturb = 1.0E-13
      d3: Direct "Direct, temperature (ht)" | linsolver = pardiso; pivotperturb = 1.0E-13
  sol3 "Solution Store 2" (study std1)

Datasets
  dset1: Solution | solution = sol1
  dset2: Solution | solution = none
  dset3: Solution | solution = sol3

Plots
  pg1: PlotGroup2D "Velocity (spf)" | data = dset1
    surf1: Surface | expr = spf.U
  pg2: PlotGroup2D "Pressure (spf)" | data = dset1
    con1: Contour | expr = p; levelrounding = off
    surf1: Surface | expr = p
  pg3: PlotGroup2D "Relative Humidity (mt)" | data = dset1
    surf1: Surface | expr = mt.phi
  pg4: PlotGroup2D "Temperature (ht)" | data = dset1
    surf1: Surface | expr = T
  pg5: PlotGroup2D "Isothermal Contours (ht)" | data = dset1
    con1: Contour | expr = T; levelrounding = off
  pg6: PlotGroup2D "Liquid Saturation" | data = dset1
    surf1: Surface | expr = mt.sl
  pg7: PlotGroup1D "Moisture Content in Porous Medium over Time" | data = dset1
    glob1: Global | expr = intopPorous(mt.wcVar); unit = kg/m; descr = Integration Porous Medium
  pg8: PlotGroup1D "1D Plot Group 8" | data = dset1
    lngr1: LineGraph on boundaries 1 | expr = T; descr = Temperature