// COMSOL Multiphysics 5.6.0.280 model "计算步中初值继承的案例2.mph"
// Outline of the model tree

Functions
  rm1: Ramp
  int1: Interpolation | table = {{0, 0}, {10, 50}, {100, 50}, {110, 0}, {200, 0}}

Geometry
  geom1 "Geometry 1" (1D, length unit m)
    i1: Interval | coord = {0, 0.1}
    fin: Finalize "Form Union"

Materials
  mat1: Common "High-strength alloy steel" on all domains
    def "Basic"
      relpermeability = 1
      heatcapacity = 475[J/(kg*K)]
      thermalconductivity = 44.5[W/(m*K)]
      electricconductivity = 4.032e6[S/m]
      relpermittivity = 1
      thermalexpansioncoefficient = 12.3e-6[1/K]
      density = 7850[kg/m^3]
    Enu "Young's modulus and Poisson's ratio"
      youngsmodulus = 200e9[Pa]
      poissonsratio = 0.30
    Murnaghan
      l = -3.0e11[Pa]
      m = -6.2e11[Pa]
      n = -7.2e11[Pa]
    Lame "Lamé parameters"
      lambLame = 1.15e11[Pa]
      muLame = 7.69e10[Pa]

Physics
  ht: HeatTransfer "Heat Transfer in Solids" on all domains
    dependent variable T
    PhysicalModelProperty.Ac = 1[mm^2]
    solid1: SolidHeatTransferModel "Solid 1" (default)
    init1: init "Initial Values 1" (default)
    ins1: ThermalInsulation (default)
    temp1: TemperatureBoundary "Temperature 1" on boundaries 1 | T0 = 293.15[K]+50-50*rm1((t-100)/10)
    hf1: HeatFluxBoundary "Heat Flux 1" on boundaries 2 | HeatFluxType = GeneralInwardHeatFlux; h = 5

Mesh
  mesh1 "Mesh 1" (physics-controlled)

Studies
  std1 "Study 1"
    time: Transient "Time Dependent" | tlist = range(0,1,100)
    time2: Transient "Time Dependent 2" | tlist = range(100,1,200)

Solver configurations
  sol1 "Solution 1" (study std1)
    v1: Variables "Dependent Variables 1"
    t1: Time "Time-Dependent Solver 1"
      tlist = range(0,1,100)
      atolmethod = {comp1_T, global}
      atolvaluemethod = {comp1_T, factor}
      atol = {comp1_T, 1e-3}
      maxorder = 2
      estrat = exclude
      fc1: FullyCoupled
        linsolver = d1
        damp = 0.9
        jtech = once
        stabacc = aacc
        aaccdim = 5
        aaccmix = 0.9
        aaccdelay = 1
      d1: Direct "Direct, temperature (ht)" | linsolver = pardiso; pivotperturb = 1.0E-13
    su1: StoreSolution "Solution Store 1"
    v2: Variables "Dependent Variables 2" | initmethod = sol; notsolmethod = sol
    t2: Time "Time-Dependent Solver 2"
      tlist = range(100,1,200)
      atolmethod = {comp1_T, global}
      atolvaluemethod = {comp1_T, factor}
      atol = {comp1_T, 1e-3}
      maxorder = 2
      estrat = exclude
      fc1: FullyCoupled
        linsolver = d1
        damp = 0.9
        jtech = once
        stabacc = aacc
        aaccdim = 5
        aaccmix = 0.9
        aaccdelay = 1
      d1: Direct "Direct, temperature (ht)" | linsolver = pardiso; pivotperturb = 1.0E-13
  sol2 "Solution Store 1" (study std1)

Datasets
  dset1: Solution | solution = sol1
  dset2: Solution | solution = sol2

Plots
  pg1: PlotGroup1D "Temperature (ht)" | data = dset2
    lngr1: LineGraph on domains 1 | expr = T; xdata = expr; xdataexpr = x
    lngr2: LineGraph on all domains | data = dset1; expr = T
  pg3: PlotGroup1D "1D Plot Group 3" | data = dset1
    lngr1: LineGraph on all domains | data = dset1; expr = T
  pg4: PlotGroup1D "1D Plot Group 4" | data = dset1
    ptgr1: PointGraph on boundaries 1 | data = dset2; expr = T